<?xml version="1.0"?>
<!--
  File:     ASh-82T-7.xml
  Author:   Ron Jensen

  Inputs:
    name:           ASh-82T-7
    type:           piston
    power:          160.0 hp
    augmented?      no
    injected?       no
-->

<piston_engine name="ASh-82T-7">
	<minmp unit="INHG">          6.0 </minmp>
	<maxmp unit="INHG">         28.5 </maxmp>
	<displacement unit="IN3"> 2515.3 </displacement>
	<maxhp>        1900.00 </maxhp>
	<cycles>         4.0 </cycles>
	<idlerpm>      700.0 </idlerpm>
	<maxrpm>      2800.0 </maxrpm>
	<maxthrottle>    1.0 </maxthrottle><!-- Deprecated -->
	<minthrottle>    0.1 </minthrottle><!-- Deprecated -->
	<sparkfaildrop>  0.1 </sparkfaildrop>
	<volumetric-efficiency> 0.85 </volumetric-efficiency>,
	<!--<bsfc> 				0.735 </bsfc>-->
	<stroke unit="IN">  6.102  </stroke>
	<bore unit="IN">    6.122 </bore>
	<cylinders>         14.0  </cylinders>
	<compression-ratio> 6.90 </compression-ratio>
</piston_engine>
