<?xml version="1.0"?>
<!--
  File:     Lorraine-Dietrich_12Eb.xml
  Author:   Ron Jensen and Bomber
  Version: 2.0

  Inputs:
    name:           LD_12Eb
    type:           piston
    power:          444 hp
    augmented?      no
    injected?       no
-->


<piston_engine name="Lorraine-Dietrich_12Eb">
    <injected>0</injected>
    <displacement unit="IN3"> 1446</displacement>
			<!-- this value is used to determine mass air and fuel flow which impacts engine power and cooling. -->
    <bore unit="IN"> 6.8  </bore>
			<!-- cylinder bore is currently unused. -->
    <stroke unit="IN"> 4.7 </stroke>
			<!-- piston stroke is used to determine the mean piston speed.
			A longer stroke results in an engine that does not work as well at higher speeds -->
    <cylinders> 12 </cylinders>
			<!-- number of cylinders scales the cylinder head mass. -->
	<compression-ratio> 5.5 </compression-ratio>
			<!-- the compression ratio affects the change in volumetric efficiency with altitude.-->
	<maxhp> 505 </maxhp>
			<!-- this value is the nominal power the engine creates at maxrpm.
			It will determine bsfc if that tag is not input. It also determines the starter motor power. -->
	<cycles> 4 </cycles>
			<!-- Designate a 2 or 4 stroke engine. Currently only the 4 stroke engine is supported. -->
    <idlerpm> 500.0 </idlerpm>
			<!-- this value affects the throttle fall off and the engine stops running
			if it is slowed below 80% of this value. The engine starts running when it reaches 80% of this value. -->
    <maxrpm> 2100.0 </maxrpm>
			<!-- this value is used to calculate air-box resistance and BSFC.
			It also affects oil pressure among other things. -->

		<!-- AIR INTAKE -->

	<ram-air-factor> 0 </ram-air-factor>
			<!-- this number creates a pressure increase with an increase in dynamic pressure (aircraft speed).
				is the efficiency of the air scoop intake. 0 turns ram air off. Default is 1. -->
	<air-intake-impedance-factor> 0 </air-intake-impedance-factor>
			<!-- this number is the pressure drop across the intake system. Increasing it reduces available manifold pressure.
				It is determined by <maxmp> if not supplied. -->

		<!-- THROTTLE -->

    <maxmp unit="INHG"> 29.96 </maxmp>
			<!-- this value is the nominal maximum manifold pressure at sea-level without boost.
			Along with maxrpm it determines the resistance of the aircraft's intake system.
			See air-intake-impedance-factor

			It is used for determining <BSFC> and <air-intake-impedance-factor> if a values are not supplied
			for those items. In a supercharged engine is always the pressure at sea level under standard
			conditions (29.9). -->

	<minmp unit="INHG"> 8.8 </minmp>
			<!-- this value is the nominal idle manifold pressure at sea-level without boost.
			Along with idlerpm, it determines the throttle response slope. -->

			<!-- BOOST -->

   	<boostmanual> 0 </boostmanual>
			<!-- whether a multispeed supercharger will manually or automatically shift boost speeds.
			On manual shifting the boost speeds is accomplished by controlling propulsion/engine/boostspeed -->
   	<numboostspeeds> 0 </numboostspeeds>
			<!-- zero (or not present) for a naturally-aspirated engine, either 1, 2 or 3 for a boosted engine.
			This corresponds to the number of supercharger speeds. Merlin XII had 1 speed, Merlin 61 had 2,
			a late Griffon engine apparently had 3. No known engine more than 3, although some German engines
			apparently had a continuously variable-speed supercharger. -->

    <ratedboost1 unit="INHG"> 18.32 </ratedboost1>
			<!-- the absolute rated boost above sea level ambient (14.7 PSI, 29.92 inHg
			for a given boost speed, in psi -->
	<ratedpower1 unit="HP"> 444 </ratedpower1>
			<!-- unused -->
    <ratedrpm1> 1850 </ratedrpm1>
			<!-- The rpm at which rated boost is developed  -->
	<ratedaltitude1 unit="FT"> 13000 </ratedaltitude1>
			<!-- The altitude up to which rated boost can be maintained.
			Up to this altitude the boost is maintained constant for a given throttle position by the BCV or wastegate.
			Beyond this altitude the manifold pressure must drop, since the supercharger is now at maximum unregulated
			output. The actual pressure multiplier of the supercharger system is calculated at initialisation from this
			value. -->

		<!-- POWER PRODUCTION -->

	<sparkfaildrop> 0.1 </sparkfaildrop>
			<!-- this is the percentage drop in horsepower for single magneto operation, try a value of 0.8 or so. -->
    <volumetric-efficiency> 0.756 </volumetric-efficiency>
			<!-- controls how much air goes through the engine at a given RPM.
			Values below 1 for unboosted engines and values over 1 for boosted engines. -->
	<bsfc unit="LBS/HP*HR"> 0.429 </bsfc>
			<!-- Indicated Specific Fuel Consumption.
			The power produced per unit of fuel. Higher numbers give worse fuel economy.
			This number may need to be lowered slightly from actual BSFC numbers because some internal engine losses
			are modeled separately. -->

		<!-- COOILING -->

    <cylinder-head-mass unit="LBS"> 120 </cylinder-head-mass>
			<!-- the nominal mass of a cylinder head. A larger value slows changes in engine temperature.
			So if you have a '5-minute' limit on a power setting you can adjust this
			value so the engine just starts to overheat at the end of the given time frame.-->
	<cooling-factor> 0.54 </cooling-factor>
			<!-- this number models how efficient the aircraft cooling system is. Raising the value makes
			the engine run cooler. This value is exposed on the property tree so it may be
			altered at runtime to simulate cowl flaps, for example. -->

		<!-- TUNEING -->

		<!--
    		* Using a constant speed load, set the engine model to full throttle and rated RPM.
    		* Set <ram-air-factor> to zero.
    		* Adjust <air-intake-impedance-factor> to achieve the proper static full throttle manifold pressure.
    		* Increase airspeed to cruise and adjust <ram-air-factor> to achieve the proper dynamic full throttle manifold pressure.
    		* Adjust <volumetric-efficiency> first to achieve desired fuel flow rate, leaning engine as required.
    		* Adjust <bsfc> to achieve desired power.

		-->

</piston_engine>
