<?xml version="1.0"?>
<!-- Generated by Simon 'bomber' Morley

dummy prop for use with engines that produce no thrust
-->

<propeller name="prop">
  <ixx> 2.4 </ixx>

  <diameter unit="IN"> 72.0 </diameter>

  <numblades>  2 </numblades>

  <minpitch>   0 </minpitch>

  <maxpitch>  90 </maxpitch>

  <minrpm>     0 </minrpm>

  <maxrpm> 10000 </maxrpm>

<ct_factor>0.0</ct_factor>

<cp_factor>1.0</cp_factor>

  <table name="C_THRUST" type="internal">

    <tableData>

         0    10   20   30   40   50   60   70   80   90

    0.0  0.0  0.0  0.0  0.0  0.0  0.0  0.0  0.0  0.0  0.0

    1.0  0.0  0.0  0.0  0.0  0.0  0.0  0.0  0.0  0.0  0.0

    </tableData>

  </table>

  <table name="C_POWER" type = "internal">

    <tableData>

         0    10   20   30   40   50   60   70   80   90

    0.0  0.0  0.0  0.0  0.0  0.0  0.0  0.0  0.0  0.0  0.0

    1.0  0.0  0.0  0.0  0.0  0.0  0.0  0.0  0.0  0.0  0.0

    </tableData>

  </table>

</propeller>
