<?xml version="1.0"?>

<propeller name="no prop">

	<ixx unit="SLUG*FT2"> 0 </ixx>

	<!--
	Prop Characteristics
	-->

	<diameter unit="IN">  0.001 </diameter>
	<numblades> 2 </numblades>
 	<constspeed> 0 </constspeed>

	<!--
	<gearratio> is the gearing between the prop and the engine,
	Normally it's defined from the engine to the propeller and is a value below zero
	ie 0.78
	To specify from the propeller to the engine use 1/X = gearration = 1/0.78 = 1.28
	-->


  <gearratio>  1.0 </gearratio>


	<!--
	<ct_factor> is the props co-efficent of thrust 'tuning' factor
	<cp_factor> is the props co-efficent of power 'tuning' factor
	-->
	<ct_factor> 1.0 </ct_factor>
	<cp_factor> 1.0 </cp_factor>


  <table name="C_THRUST" type="internal">
     <tableData>
0		0
1		0
    </tableData>
  </table>


  <table name="C_POWER" type="internal">
     <tableData>
0		0
1		0
     </tableData>
  </table>


</propeller>
