<aerodynamics>


		<!--(ported from C172p:) ground effect-->
		<function name="aero/function/Cl_groundeffect">
			<description>Change in lift due to ground effect</description>
			<table>
				<independentVar>aero/h_b-mac-ft</independentVar>
				<tableData>
					0.0000	1.2030
					0.1000	1.1270
					0.1500	1.0900
					0.2000	1.0730
					0.3000	1.0460
					0.4000	1.0550
					0.5000	1.0190
					0.6000	1.0130
					0.7000	1.0080
					0.8000	1.0060
					0.9000	1.0030
					1.0000	1.0020
					1.1000	1.0000
				</tableData>
			</table>
		</function>
		<function name="aero/function/Cd_groundeffect">
			<description>Change in drag due to ground effect</description>
			<table>
			<independentVar>aero/h_b-mac-ft</independentVar>
			<tableData>
				0.0000	0.4800
				0.1000	0.5150
				0.1500	0.6290
				0.2000	0.7090
				0.3000	0.8150
				0.4000	0.8820
				0.5000	0.9280
				0.6000	0.9620
				0.7000	0.9880
				0.8000	1.0000
				0.9000	1.0000
				1.0000	1.0000
				1.1000	1.0000
			</tableData>
			</table>
		</function>

  <axis name="LIFT">

    <function name="aero/force/Lift_alpha">
      <description>Lift due to alpha</description>
      <product>
          <property>aero/qbar-psf</property>
          <property>metrics/Sw-sqft</property>
          <property>aero/function/Cl_groundeffect</property>
					<table>
						<independentVar lookup="row">aero/alpha-deg</independentVar>
						<tableData>
							-25.000  -0.7431
							<!--Cl calculated by XFLR5 for wing profile-->
							-10        -0.2114232
							-9.5        -0.1485309
							-8      -0.003404671
							-6.5        0.02558893
							-5        0.04875606
							-3.5         0.2374816
							-2         0.3927343
							-0.5         0.5220501
							1         0.6147663
							2.5         0.7348387
							4         0.7096294
							6         0.8761503
							8         0.6797687
							9.5         0.7577944
							11         0.7895326
							12.5         0.7779689
							14         0.7799184
							15.5         0.8815265
							17.5         0.9600516
							19         0.9120852
							25.000   0.9021
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						</tableData>
					</table>
      </product>
    </function>

    <function name="aero/force/Lift_speedbrake">
       <description>Delta Lift due to speedbrake</description>
       <product>
           <property>aero/qbar-psf</property>
           <property>metrics/Sw-sqft</property>
           <property>fcs/speedbrake-pos-norm</property>
           <value>-0.02</value>
       </product>
    </function>

    <function name="aero/force/Lift_elevator">
       <description>Lift due to Elevator Deflection</description>
       <product>
           <property>aero/qbar-psf</property>
           <property>metrics/Sw-sqft</property>
           <property>fcs/elevator-pos-rad</property>
           <value>0.02</value>
       </product>
    </function>


  </axis>

  <axis name="DRAG">

    <function name="aero/force/Drag_basic">
       <description>Drag at zero lift</description>
       <product>
          <property>aero/qbar-psf</property>
          <property>metrics/Sw-sqft</property>
          <property>aero/function/Cd_groundeffect</property>
          <table>
            <independentVar lookup="row">aero/alpha-rad</independentVar>
            <tableData>
                                                        -1.57    1.175
                                                        -0.26    0.021
                                                        0.00    0.004
                                                        0.26    0.022
                                                        1.57    1.222
            </tableData>
          </table>
					<value>0.9</value>
       </product>
    </function>

    <function name="aero/force/Drag_induced">
       <description>Induced drag</description>
         <product>
           <property>aero/qbar-psf</property>
           <property>metrics/Sw-sqft</property>
           <property>aero/cl-squared</property>
          <property>aero/function/Cd_groundeffect</property>
           <value>0.035</value>
         </product>
    </function>

    <function name="aero/force/Drag_mach">
       <description>Drag due to mach</description>
        <product>
          <property>aero/qbar-psf</property>
          <property>metrics/Sw-sqft</property>
          <table>
            <independentVar lookup="row">velocities/mach</independentVar>
            <tableData>
                0.00      0.000
                0.7      0.000
                1.10      0.023
                1.80      0.015
            </tableData>
          </table>
        </product>
    </function>

    <function name="aero/force/Drag_speedbrake">
       <description>Drag due to speedbrakes</description>
         <product>
           <property>aero/qbar-psf</property>
           <property>metrics/Sw-sqft</property>
           <property>fcs/speedbrake-pos-norm</property>
           <value>0.25</value>
         </product>
    </function>

    <function name="aero/force/Drag_beta">
       <description>Drag due to sideslip</description>
       <product>
					<property>aero/qbar-psf</property>
					<property>metrics/Sw-sqft</property>
					<table>
						<independentVar lookup="row">aero/beta-rad</independentVar>
						<tableData>
                                                        -1.57    1.230
                                                        -0.26    0.050
                                                        0.00    0.000
                                                        0.26    0.050
                                                        1.57    1.230
                                                </tableData>
					</table>
					<value>3</value>
       </product>
    </function>

    <function name="aero/force/Drag_elevator">
       <description>Drag due to Elevator Deflection</description>
       <product>
           <property>aero/qbar-psf</property>
           <property>metrics/Sw-sqft</property>
           <abs><property>fcs/elevator-pos-norm</property></abs>
           <value>0.03</value>
       </product>
    </function>

  </axis>

  <axis name="SIDE">

    <function name="aero/force/Side_beta">
       <description>Side force due to beta</description>
       <product>
           <property>aero/qbar-psf</property>
           <property>metrics/Sw-sqft</property>
           <property>aero/beta-rad</property>
           <value>-1</value>
       </product>
    </function>

  </axis>

  <axis name="ROLL">

    <function name="aero/moment/Roll_beta">
       <description>Roll moment due to beta</description>
       <product>
           <property>aero/qbar-psf</property>
           <property>metrics/Sw-sqft</property>
           <property>metrics/bw-ft</property>
           <property>aero/beta-rad</property>
           <value>-0.1</value>
                    <!--
                          stall and spin (1):
                          via diedra effect.
                          Makes the higher (downwind) wing drop at forward slip
                          and worsens the spin in a skidding turn.
                          But if too great, prevents the spin departure in a slipping turn
                    -->
                    <table>
                        <independentVar lookup="row">aero/alpha-wing-rad</independentVar>
                        <tableData>
                            0.279     1
                            0.297     3.5
                        </tableData>
                    </table>
       </product>
    </function>

    <function name="aero/moment/Roll_damp">
       <description>Roll moment due to roll rate</description>
       <product>
           <property>aero/qbar-psf</property>
           <property>metrics/Sw-sqft</property>
           <property>metrics/bw-ft</property>
           <property>aero/bi2vel</property>
           <property>velocities/p-aero-rad_sec</property>
           <value>-0.55</value>
       </product>
    </function>

    <function name="aero/moment/Roll_yaw">
       <description>Roll moment due to yaw rate</description>
       <product>
           <property>aero/qbar-psf</property>
           <property>metrics/Sw-sqft</property>
           <property>metrics/bw-ft</property>
           <property>aero/bi2vel</property>
           <property>velocities/r-aero-rad_sec</property>
           <value>0.15</value><!--
                    <table>-->
                        <!--
                            stall and spin (3):
                            yaw effect
                        --><!--
                        <independentVar lookup="row">aero/alpha-wing-rad</independentVar>
                        <independentVar lookup="column">velocities/r-aero-rad_sec</independentVar>
                        <tableData>
                                    -0.15  -0.1   0    0.1   0.15
                            0.279    1      1     1    1     1
                            0.297    15     10    1    10    15
                            0.5      5      5     1    5     5
                        </tableData>
                    </table>-->
       </product>
    </function>

    <function name="aero/moment/Roll_aileron">
       <description>Roll moment due to aileron</description>
       <product>
          <property>aero/qbar-psf</property>
          <property>metrics/Sw-sqft</property>
          <property>metrics/bw-ft</property>
          <property>fcs/left-aileron-pos-rad</property>
          <value>0.17</value>
	  <!-- (ported from c172p:) the ailerons are less efficient and even create an opposite roll moment close to stall because deflection down makes the wing portion stall-->
                    <table>
                        <independentVar lookup="row">aero/alpha-deg</independentVar>
                        <tableData>
                            15    1
                            16    0.3
                            18   -0.1
                        </tableData>
                    </table>
       </product>
    </function>

    <function name="aero/moment/Roll_rudder">
       <description>Roll moment due to rudder</description>
       <product>
           <property>aero/qbar-psf</property>
           <property>metrics/Sw-sqft</property>
           <property>metrics/bw-ft</property>
           <property>fcs/rudder-pos-rad</property>
           <value>0.01</value>
       </product>
    </function>

  </axis>

  <axis name="PITCH">

    <function name="aero/moment/Pitch_alpha">
       <description>Pitch moment due to alpha</description>
       <product>
           <property>aero/qbar-psf</property>
           <property>metrics/Sw-sqft</property>
           <property>metrics/cbarw-ft</property>
		<table>
			<independentVar lookup="row">aero/alpha-deg</independentVar>
			<tableData><!--hstab incidence: -2°-->
				-55.3	-1
				2       0
				59.3	1
			</tableData>
		</table>
		<value>-1.2</value>
                    <!--
                        stall and spin (5):
                        horizontal tail stall (for flat spin)
                    -->
                    <table>
                        <independentVar lookup="row">aero/alpha-deg</independentVar>
                        <tableData>
                            20    1
                            25    0.6
                            35    0.4
                            45    0.5
                            55    0.4
                            65    0.2
                            90    0.1
                        </tableData>
                    </table>
       </product>
    </function>

    <function name="aero/moment/Pitch_elevator">
       <description>Pitch moment due to elevator</description>
       <product>
          <property>aero/qbar-psf</property>
          <property>metrics/Sw-sqft</property>
          <property>metrics/cbarw-ft</property>
          <property>fcs/elevator-pos-rad</property>
	  <value>1.7</value>
          <table>
            <independentVar lookup="row">velocities/mach</independentVar>
            <tableData>
              0.0     -0.900
              2.0     -0.600
            </tableData>
          </table>
	  <!--(ported from C172p): the elevator looses efficiency when stalled-->
		<table>
			<independentVar lookup="row">fcs/elevator-pos-rad</independentVar>
			<independentVar lookup="column">aero/alpha-deg</independentVar>
			<tableData>
					20  25   35     45     55      65      90
				-0.49   1   0.5  0.2    0.1    0.1     0.1     0.1
				0       1   0.6  0.3    0.15   0.1     0.1     0.1
				0.40    1   0.9  0.8    0.7    0.6     0.5     0.4
			</tableData>
		</table>
       </product>
    </function>

    <function name="aero/moment/Pitch_damp">
       <description>Pitch moment due to pitch rate</description>
       <product>
           <property>aero/qbar-psf</property>
           <property>metrics/Sw-sqft</property>
           <property>metrics/cbarw-ft</property>
           <property>aero/ci2vel</property>
           <property>velocities/q-aero-rad_sec</property>
           <value>-6</value>
       </product>
    </function>

    <function name="aero/moment/Pitch_alphadot">
       <description>Pitch moment due to alpha rate</description>
       <product>
           <property>aero/qbar-psf</property>
           <property>metrics/Sw-sqft</property>
           <property>metrics/cbarw-ft</property>
           <property>aero/ci2vel</property>
           <property>aero/alphadot-rad_sec</property>
           <value>-12</value>
       </product>
    </function>

  </axis>

  <axis name="YAW">

    <function name="aero/moment/Yaw_beta">
       <description>Yaw moment due to beta</description>
       <product>
           <property>aero/qbar-psf</property>
           <property>metrics/Sw-sqft</property>
           <property>metrics/bw-ft</property>
           <property>aero/beta-rad</property>
           <value>0.13</value>
       </product>
    </function>

    <function name="aero/moment/Yaw_damp">
       <description>Yaw moment due to yaw rate</description>
       <product>
           <property>aero/qbar-psf</property>
           <property>metrics/Sw-sqft</property>
           <property>metrics/bw-ft</property>
           <property>aero/bi2vel</property>
           <property>velocities/r-aero-rad_sec</property>
           <value>-0.08</value>
       </product>
    </function>

    <function name="aero/moment/Yaw_rudder">
       <description>Yaw moment due to rudder</description>
       <product>
           <property>aero/qbar-psf</property>
           <property>metrics/Sw-sqft</property>
           <property>metrics/bw-ft</property>
           <property>fcs/rudder-pos-rad</property>
           <value>-0.05</value>
       </product>
    </function>

    <function name="aero/moment/Yaw_aileron">
       <description>Adverse yaw</description>
       <product>
           <property>aero/qbar-psf</property>
           <property>metrics/Sw-sqft</property>
           <property>metrics/bw-ft</property>
           <property>fcs/left-aileron-pos-rad</property><!--
           <value>-0.025</value>-->
                    <table>
                        <independentVar lookup="row">aero/alpha-wing-rad</independentVar>
                        <independentVar lookup="column">aero/beta-rad</independentVar>
                        <tableData>
                                    -0.35        0           0.35
                            0       -0.0216      -0.0216     -0.0216
                            0.070   -0.039       -0.0786     -0.039
                            0.094   -0.025       -0.0504     -0.025
                        </tableData>
                    </table>
       </product>
    </function>

            <function name="aero/moment/Yaw_flatspin">
                <description>Yaw_moment_due_to_flat_spin</description>
                <!--
                    stall and spin (7):
                    Feedback loop on yaw rate for flat spin.
                    Accelerates the yaw rate when stalled, up to a self-maintained flat spin (like a dead leaf).
                    r-aero-rad_sec with non-zero coefficients mainly sets the max yawing rate, if attained.
                    The coefficients set the yaw moment, thus the speed too, and the flatness of the spin.
                    Too great coefficients give an divergent effect and a non-recoverable spin.
                    (tricky)
                -->
                <product>
                    <property>aero/qbar-psf</property>
                    <property>metrics/Sw-sqft</property>
                    <property>metrics/bw-ft</property>
                    <property>aero/bi2vel</property>
                    <table>
                        <independentVar lookup="row">velocities/r-aero-rad_sec</independentVar>
                        <independentVar lookup="column">aero/alpha-wing-rad</independentVar>
                        <tableData>
                                 0.279 0.4
                            -15  0     0
                            -5   0     0
                            -3   0     -0.25
                            -1   0     0
                            0    0     0
                            1    0     0
                            3    0     0.25
                            5    0     0
                            15   0     0
                        </tableData>
                    </table>
                </product>
            </function>
  </axis>


</aerodynamics>
