<?xml version="1.0"?>

<system name="catapult"
   xmlns:xsi="http://www.w3.org/2001/XMLSchema-instance"
   xsi:noNamespaceSchemaLocation="http://jsbsim.sourceforge.net/JSBSimSystem.xsd">

    <property value="67"> systems/catapult/max_speed </property>

  <channel name="Catapult">

       <switch name="systems/catapult/cat-cmd-norm">
          <default value="0"/>
          <test  logic="AND" value="0">
               systems/catapult/cat-pos-norm gt 0.999
          </test>
          <test  logic="AND" value="1">
               systems/catapult/cat-launch-cmd == 1
          </test>
          <output>systems/catapult/cat-launch-cmd</output>
       </switch>

       <kinematic name="systems/catapult/cat-timer">
          <input>systems/catapult/cat-cmd-norm</input>
          <traverse>
              <setting>
                 <position>0.0</position>
                 <time>0.0</time>
              </setting>
              <setting>
                 <position>1.0</position>
                 <time>90</time>
              </setting>
          </traverse>
          <output>systems/catapult/cat-pos-norm</output>
       </kinematic>

		<pure_gain name="systems/catapult/cat-force">
          <input>inertia/weight-lbs</input>
          <gain>0.25</gain>
		</pure_gain>

		<summer name="systems/catapult/speed-error">
			<description>
			This component computes the error between the target winch
			speed and actual plane speed
			</description>
			<input>  systems/catapult/max_speed </input>
			<input> -velocities/ve-kts </input>
		</summer>

		<pid name="systems/catapult/speed_control">
			<input>systems/catapult/speed-error</input>
			<kp> 1 </kp>
			<ki> 0.1  </ki>
			<kd> 0.1  </kd>
			<output>systems/catapult/speed_control</output>
		</pid>

       <switch name="systems/catapult/cat-final">
           <default value="0"/>
           <test  logic="AND" value="systems/catapult/cat-force">
                systems/catapult/cat-launch-cmd == 1
                systems/catapult/cat-pos-norm lt 0.999
                systems/catapult/cat-pos-norm gt 0.0
           </test>
           <output>external_reactions/catapult/magnitude-lbs</output>
       </switch>

  </channel>

</system>
